<?xml version="1.0"?>
<?xml-stylesheet href="http://jsbsim.sourceforge.net/JSBSim.xsl" type="text/xsl"?>
<fdm_config name="Allah-u-Akbar" version="2.0" release="BETA"
 xmlns:xsi="http://www.w3.org/2001/XMLSchema-instance"
 xsi:noNamespaceSchemaLocation="http://jsbsim.sourceforge.net/JSBSim.xsd">

    <fileheader>
        <author> Adil Loya </author>
        <filecreationdate> 23-1-2022 </filecreationdate>
        <version> Version </version>
        <description> Models Allah-u-Akbar - This model stands firmly on ground </description>
    </fileheader>

    <metrics>
        <wingarea unit="FT2"> 2.519 </wingarea>
        <wingspan unit="FT"> 4.265 </wingspan>
        <chord unit="FT"> 0.591 </chord>
        <htailarea unit="FT2"> 0.36 </htailarea>
        <htailarm unit="FT"> 2.26 </htailarm>
        <vtailarea unit="FT2"> 0.13 </vtailarea>
        <vtailarm unit="FT"> 2.28 </vtailarm>
        <location name="AERORP" unit="IN">
            <x> 7.7 </x>
            <y> 0 </y>
            <z> 0 </z>
        </location>
        <location name="EYEPOINT" unit="IN">
            <x> 0 </x>
            <y> 0 </y>
            <z> 0 </z>
        </location>
      <location name="VRP" unit="IN">
         <x>0</x>
         <y>  0.0 </y>
         <z> 0 </z>
      </location>
    </metrics>

    <mass_balance>
        <ixx unit="SLUG*FT2"> 1.71603 </ixx>
        <iyy unit="SLUG*FT2"> 4.57776 </iyy>
        <izz unit="SLUG*FT2"> 6.24868 </izz>
        <ixy unit="SLUG*FT2"> 0 </ixy>
        <ixz unit="SLUG*FT2"> -0.20402 </ixz>
        <iyz unit="SLUG*FT2"> 0 </iyz>
        <emptywt unit="LBS"> 5.2 </emptywt>
        <location name="CG" unit="IN">
            <x>  8.04</x><!--6.5   (-0.67 feet from mac) -->
            <y> 0 </y>
            <z> 0.3 </z>
        </location>
    </mass_balance>

   <ground_reactions>
        <contact type="BOGEY" name="LEFT_MLG">
            <location unit="IN">
                <x> -3.109 </x>
                <y> 4.56 </y>
                <z> -4.1328</z>
            </location>
            <static_friction> 0.8 </static_friction>
            <dynamic_friction> 0.5 </dynamic_friction>
            <rolling_friction> 0.02 </rolling_friction>
            <spring_coeff unit="LBS/FT"> 55 </spring_coeff>
            <damping_coeff unit="LBS/FT/SEC"> 5 </damping_coeff>
            <max_steer unit="DEG"> 0.0 </max_steer>
            <brake_group> LEFT </brake_group>
            <retractable>0</retractable>
        </contact>
        <contact type="BOGEY" name="RIGHT_MLG">
            <location unit="IN">
                <x> -3.109 </x>
                <y> -4.56 </y>
                <z> -4.1328 </z>
            </location>
            <static_friction> 0.8 </static_friction>
            <dynamic_friction> 0.5 </dynamic_friction>
            <rolling_friction> 0.02 </rolling_friction>
           <spring_coeff unit="LBS/FT"> 55 </spring_coeff>
            <damping_coeff unit="LBS/FT/SEC"> 5 </damping_coeff>
            <max_steer unit="DEG"> 0.0 </max_steer>
            <brake_group> RIGHT </brake_group>
            <retractable>0</retractable>
        </contact>
        <contact type="BOGEY" name="TAIL_LG">
            <location unit="IN">
                <x> 25.07 </x>
                <y> 0 </y>
                <z> -4.05 </z>
            </location>
            <static_friction> 0.8 </static_friction>
            <dynamic_friction> 0.5 </dynamic_friction>
            <rolling_friction> 0.02 </rolling_friction>
           <spring_coeff unit="LBS/FT"> 55 </spring_coeff>
            <damping_coeff unit="LBS/FT/SEC"> 5 </damping_coeff>
            <max_steer unit="DEG"> 30 </max_steer>
            <brake_group> NONE </brake_group>
            <retractable>0</retractable>
        </contact>
    </ground_reactions>

    <propulsion>
        <engine file="Zenoah_G-26A">
            <location unit="IN">
                <x> -9.9 </x> <!--0.5-->
                <y> 0 </y>
                <z> 0 </z>
            </location>
            <orient unit="DEG">
                <roll> 0.0 </roll>
                <pitch> 0 </pitch>
                <yaw> 0 </yaw>
            </orient>
            <feed>0</feed>
            <thruster file="10x8">
                <location unit="IN">
                    <x> -9.9 </x> <!--0.5-->
                    <y> 0 </y>
                    <z> 0 </z>
                </location>
                <orient unit="DEG">
                    <roll> 0.0 </roll>
                    <pitch> 0.0 </pitch>
                    <yaw> 0.0 </yaw>
                </orient>
                <p_factor>10</p_factor>
            </thruster>
        </engine>
        <tank type="FUEL">    <!-- Tank number 0 -->
            <location unit="IN">
                <x> 0</x>
                <y> 0 </y>
                <z> 0 </z>
            </location>
            <capacity unit="LBS"> 0 </capacity>
            <contents unit="LBS"> 0 </contents>
        </tank>
    </propulsion>

    <flight_control name="FCS: Allah-u-Akbar">
     <channel name="All">

        <summer name="Pitch Trim Sum">
            <input>fcs/elevator-cmd-norm</input>
            <input> auto/elevator-cmd-norm </input>
            <input>fcs/pitch-trim-cmd-norm</input>
            <clipto>
                <min>-1</min>
                <max>1</max>
            </clipto>
        </summer>

        <aerosurface_scale name="Elevator Control">
            <input>fcs/pitch-trim-sum</input>
            <range>
                <min>-0.35</min>
                <max>0.3</max>
            </range>
            <output>fcs/elevator-pos-rad</output>
        </aerosurface_scale>

        <aerosurface_scale name="Elevator Normalized">
            <input>fcs/elevator-pos-rad</input>
            <domain>
                <min>-0.3</min>
                <max> 0.3</max>
            </domain>
            <range>
                <min>-1</min>
                <max> 1</max>
            </range>
            <output>fcs/elevator-pos-norm</output>
        </aerosurface_scale>

        <summer name="Roll Trim Sum">
            <input>fcs/aileron-cmd-norm</input>
            <input> auto/aileron-cmd-norm </input>
            <input>fcs/roll-trim-cmd-norm</input>
            <clipto>
                <min>-1</min>
                <max>1</max>
            </clipto>
        </summer>

        <aerosurface_scale name="Left Aileron Control">
            <input>-fcs/roll-trim-sum</input>
            <range>
                <min>-0.35</min>
                <max>0.35</max>
            </range>
            <output>fcs/left-aileron-pos-rad</output>
        </aerosurface_scale>

        <aerosurface_scale name="Right Aileron Control">
            <input>fcs/roll-trim-sum</input>
            <range>
                <min>-0.35</min>
                <max>0.35</max>
            </range>
            <output>fcs/right-aileron-pos-rad</output>
        </aerosurface_scale>

        <aerosurface_scale name="Left aileron Normalized">
            <input>fcs/left-aileron-pos-rad</input>
            <domain>
                <min>-0.35</min>
                <max> 0.35</max>
            </domain>
            <range>
                <min>-1</min>
                <max> 1</max>
            </range>
            <output>fcs/left-aileron-pos-norm</output>
        </aerosurface_scale>

        <aerosurface_scale name="Right aileron Normalized">
            <input>fcs/right-aileron-pos-rad</input>
            <domain>
                <min>-0.35</min>
                <max> 0.35</max>
            </domain>
            <range>
                <min>-1</min>
                <max> 1</max>
            </range>
            <output>fcs/right-aileron-pos-norm</output>
        </aerosurface_scale>

        <summer name="Rudder Command Sum">
            <input>fcs/rudder-cmd-norm</input>
            <input> auto/rudder-cmd-norm </input>
            <input>fcs/yaw-trim-cmd-norm</input>
            <clipto>
                <min>-1</min>
                <max>1</max>
            </clipto>
        </summer>

        <aerosurface_scale name="Rudder Control">
            <input>fcs/rudder-command-sum</input>
            <range>
                <min>-0.35</min>
                <max>0.35</max>
            </range>
            <output>fcs/rudder-pos-rad</output>
        </aerosurface_scale>

        <aerosurface_scale name="Rudder Normalized">
            <input>fcs/rudder-pos-rad</input>
            <domain>
                <min>-0.35</min>
                <max> 0.35</max>
            </domain>
            <range>
                <min>-1</min>
                <max> 1</max>
            </range>
            <output>fcs/rudder-pos-norm</output>
        </aerosurface_scale>
     </channel>
    </flight_control>
    <aerodynamics>

        <axis name="DRAG">
            <function name="aero/coefficient/CD0">
                <description>Drag_at_zero_lift</description>
                <product>
                    <property>aero/qbar-psf</property>
                    <property>metrics/Sw-sqft</property>
                      <table>
                          <independentVar>aero/alpha-rad</independentVar>
                          <tableData>
                              -1.5700	1.5000
                              -0.2600	0.0560
                              0.0000	0.0280
                              0.2600	0.0560
                              1.5700	1.5000
                          </tableData>
                      </table>
                </product>
            </function>
            <function name="aero/coefficient/CDi">
                <description>Induced_drag</description>
                <product>
                    <property>aero/qbar-psf</property>
                    <property>metrics/Sw-sqft</property>
                    <property>aero/cl-squared</property>
                    <value>0.0400</value>
                </product>
            </function>
            <function name="aero/coefficient/CDbeta">
                <description>Drag_due_to_sideslip</description>
                <product>
                    <property>aero/qbar-psf</property>
                    <property>metrics/Sw-sqft</property>
                      <table>
                          <independentVar>aero/beta-rad</independentVar>
                          <tableData>
                              -1.5700	1.2300
                              -0.2600	0.0500
                              0.0000	0.0000
                              0.2600	0.0500
                              1.5700	1.2300
                          </tableData>
                      </table>
                </product>
            </function>
            <function name="aero/coefficient/CDde">
                <description>Drag_due_to_Elevator_Deflection</description>
                <product>
                    <property>aero/qbar-psf</property>
                    <property>metrics/Sw-sqft</property>
                    <property>fcs/elevator-pos-norm</property>
                    <value>0.0300</value>
                </product>
            </function>
        </axis>

        <axis name="SIDE">
            <function name="aero/coefficient/CYb">
                <description>Side_force_due_to_beta</description>
                <product>
                    <property>aero/qbar-psf</property>
                    <property>metrics/Sw-sqft</property>
                    <property>aero/beta-rad</property>
                    <value>-1.0000</value>
                </product>
            </function>
        </axis>

        <axis name="LIFT">
            <function name="aero/coefficient/CLalpha">
                <description>Lift_due_to_alpha</description>
                <product>
                    <property>aero/qbar-psf</property>
                    <property>metrics/Sw-sqft</property>
					<!--  <value>1.0000</value> -->
                      <table>
                          <independentVar>aero/alpha-deg</independentVar>
                          <tableData>
                            -2	-0.2995442
							-1	-0.2292054
							0	-0.1588279
							1	-0.08847083
							2	-0.01819344
							3	0.0519455
							4	0.1218876
							5	0.1915751
							6	0.2609508
							7	0.3299583
							8	0.3985423
							9	0.4666482
							10	0.5342228
							11	0.601214
							12	0.667571
							13	0.7332446
							14	0.7981869

                          </tableData>
                      </table>
                </product>
            </function>
            <function name="aero/coefficient/CLde">
                <description>Lift_due_to_Elevator_Deflection</description>
                <product>
                    <property>aero/qbar-psf</property>
                    <property>metrics/Sw-sqft</property>
                    <!--<property>fcs/elevator-pos-deg</property>-->
					<value>1.0</value>
                     <table>
                          <independentVar>fcs/elevator-pos-deg</independentVar>
                          <tableData>

							-16	0.0592
							-8	0.0587
							0	0.0572
							8	0.602
							16	1.2742


                          </tableData>
                      </table>
                </product>
            </function>
        </axis>

        <axis name="ROLL">
            <function name="aero/coefficient/Clb">
                <description>Roll_moment_due_to_beta</description>
                <!-- aka dihedral effect -->
                <product>
                    <property>aero/qbar-psf</property>
                    <property>metrics/Sw-sqft</property>
                    <property>metrics/bw-ft</property>
                    <property>aero/beta-rad</property>
                    <value>-0.1000</value>
                </product>
            </function>
            <function name="aero/coefficient/Clp">
                <description>Roll_moment_due_to_roll_rate</description>
                <product>
                    <property>aero/qbar-psf</property>
                    <property>metrics/Sw-sqft</property>
                    <property>metrics/bw-ft</property>
                    <property>aero/bi2vel</property>
                    <property>velocities/p-aero-rad_sec</property>
                    <value>-0.486000</value> <!-- -0.85 -->
                </product>
            </function>
            <function name="aero/coefficient/Clr">
                <description>Roll_moment_due_to_yaw_rate</description>
                <product>
                    <property>aero/qbar-psf</property>
                    <property>metrics/Sw-sqft</property>
                    <property>metrics/bw-ft</property>
                    <property>aero/bi2vel</property>
                    <property>velocities/r-aero-rad_sec</property>
                    <value>0.1500</value>
                </product>
            </function>

			<function name="aero/coefficient/Clda">
                <description>Roll_moment_due_to_aileron</description>

                <product>
                    <property>aero/qbar-psf</property>
                    <property>metrics/Sw-sqft</property>
                    <property>metrics/bw-ft</property>
                   <!--<property>fcs/right-aileron-pos-deg</property>-->
					<value>1.0</value>
                     <table>
                          <independentVar>fcs/right-aileron-pos-deg</independentVar>
                          <tableData>

				-20 -0.0042328
				-10 -0.008465
				0  0.0001
				10 0.0084656
				20 0.0042328


                          </tableData>
                      </table>
				</product>

        </function>
           <!-- <function name="aero/coefficient/Clda">
                <description>Roll_moment_due_to_aileron</description>
                <product>
                    <property>aero/qbar-psf</property>
                    <property>metrics/Sw-sqft</property>
                    <property>metrics/bw-ft</property>
                    <property>fcs/left-aileron-pos-rad</property>
                      <table>
                          <independentVar>velocities/mach</independentVar>
                          <tableData>
                              0.0000	0.1300
                              2.0000	0.0570
                          </tableData>
                      </table>
                </product>
            </function>-->
            <function name="aero/coefficient/Cldr">
                <description>Roll_moment_due_to_rudder</description>
                <product>
                    <property>aero/qbar-psf</property>
                    <property>metrics/Sw-sqft</property>
                    <property>metrics/bw-ft</property>
                    <property>fcs/rudder-pos-rad</property>
                    <value>0.0100</value>
                </product>
            </function>
        </axis>

        <axis name="PITCH">
            <function name="aero/coefficient/Cmalpha">
                <description>Pitch_moment_due_to_alpha</description>
                <product>
                    <property>aero/qbar-psf</property>
                    <property>metrics/Sw-sqft</property>
                    <property>metrics/cbarw-ft</property>
                   <property>aero/alpha-deg</property>
                    <value>1</value>
					 <table>
                          <independentVar>aero/alpha-deg</independentVar>
                          <tableData>
                             -2	0.1839021
							-1	0.1445991
							0	0.1052445
							1	0.06588616
							2	0.02657202
							3	-0.01265
							4	-0.05173212
							5	-0.09062673
							6	-0.1292864
							7	-0.1676641
							8	-0.2057131
							9	-0.2433869
							10	-0.2806397
							11	-0.317426
							12	-0.3537012
							13	-0.389421
							14	-0.4245418

                          </tableData>
                      </table>
                </product>
            </function>
            <function name="aero/coefficient/Cmde">
                <description>Pitch_moment_due_to_elevator</description>
                <product>
                    <property>aero/qbar-psf</property>
                    <property>metrics/Sw-sqft</property>
                    <property>metrics/cbarw-ft</property>
                    <property>fcs/elevator-pos-deg</property>
					  <value>1</value>
                     <table>
                          <independentVar>fcs/elevator-pos-deg</independentVar>
                          <tableData>
                           -24	-0.0431
							-16	-0.0416
							-8	-0.0471
							0	-0.0327
							8	-0.0409
							16	-0.0488
							24	-0.0482

                          </tableData>
                      </table>
                </product>
            </function>
            <function name="aero/coefficient/Cmq">
                <description>Pitch_moment_due_to_pitch_rate</description>
                <product>
                    <property>aero/qbar-psf</property>
                    <property>metrics/Sw-sqft</property>
                    <property>metrics/cbarw-ft</property>
                    <property>aero/ci2vel</property>
                    <property>velocities/q-aero-rad_sec</property>
                    <value>-22.0000</value>
                </product>
            </function>
            <function name="aero/coefficient/Cmadot">
                <description>Pitch_moment_due_to_alpha_rate</description>
                <product>
                    <property>aero/qbar-psf</property>
                    <property>metrics/Sw-sqft</property>
                    <property>metrics/cbarw-ft</property>
                    <property>aero/ci2vel</property>
                    <property>aero/alphadot-rad_sec</property>
                    <value>-17.0000</value>
                </product>
            </function>
        </axis>

        <axis name="YAW">
            <function name="aero/coefficient/Cnb">
                <description>Yaw_moment_due_to_beta</description>
                <product>
                    <property>aero/qbar-psf</property>
                    <property>metrics/Sw-sqft</property>
                    <property>metrics/bw-ft</property>
                      <table>
                          <independentVar>aero/beta-deg</independentVar>
                          <tableData>
				-10		-0.007678922
				-9		-0.007012703
				-8		-0.006395698
				-7		-0.005716397
				-6		-0.004993586
				-5		-0.004259403
				-4		-0.003534559
				-3		-0.002716385
				-2		-0.001991224
				-1		-0.001141966
				0		0.000000000
				1		0.001141966
				2		0.001991224
				3		0.002716385
				4		0.003534559
				5		0.004259403
				6		0.004993586
				7		0.005716397
				8		0.006395698
				9		0.007012703
				10		0.007678922
                          </tableData>
                      </table>
                </product>
            </function>
            <function name="aero/coefficient/Cnr">
                <description>Yaw_moment_due_to_yaw_rate</description>
                <product>
                    <property>aero/qbar-psf</property>
                    <property>metrics/Sw-sqft</property>
                    <property>metrics/bw-ft</property>
                    <property>aero/bi2vel</property>
                    <property>velocities/r-aero-rad_sec</property>
                    <value>-0.070</value>
                </product>
            </function>
            <function name="aero/coefficient/Cndr">
                <description>Yaw_moment_due_to_rudder</description>
                <product>
                    <property>aero/qbar-psf</property>
                    <property>metrics/Sw-sqft</property>
                    <property>metrics/bw-ft</property>
                    <property>fcs/rudder-pos-deg</property>
                    <value>-0.001</value>
                </product>
            </function>
            <function name="aero/coefficient/Cnda">
                <description>Adverse_yaw</description>
                <product>
                    <property>aero/qbar-psf</property>
                    <property>metrics/Sw-sqft</property>
                    <property>metrics/bw-ft</property>
                    <property>fcs/left-aileron-pos-rad</property>
                    <value>-0.0300</value>
                </product>
            </function>
            <function name="aero/coefficient/Cndi">
                <description>Yaw_moment_due_to_tail_incidence</description>
                <product>
                    <property>aero/qbar-psf</property>
                    <property>metrics/Sw-sqft</property>
                    <property>metrics/bw-ft</property>
                    <value>0.0007</value>
                </product>
            </function>
        </axis>
    </aerodynamics>
    <output name="localhost" type="SOCKET" protocol="UDP" port="5138"  rate="10">

  <property> velocities/vc-kts </property>
  <property> position/h-sl-ft </property>
  <property> attitude/theta-deg </property>
  <property> attitude/phi-deg </property>
  <property> velocities/h-dot-fps </property>
  <property> velocities/mach </property>
  <property> aero/beta-deg </property>
  <property> attitude/psi-deg </property>
  <property> aero/alpha-deg </property>
  <property> velocities/p-rad_sec </property>

  <property> velocities/q-rad_sec </property>
  <property> velocities/r-rad_sec </property>
  <property> velocities/vtrue-kts </property>
  <property> velocities/vg-fps </property>
  <property> velocities/v-north-fps </property>
  <property> velocities/v-east-fps </property>
  <property> velocities/v-down-fps </property>
  <property> velocities/u-fps </property>
  <property> velocities/v-fps </property>
  <property> velocities/w-fps </property>

  <property> position/h-agl-ft </property>
  <property> position/lat-gc-deg </property>
  <property> position/long-gc-deg </property>
  <property> position/lat-geod-deg </property>
  <property> propulsion/engine/engine-rpm </property>
  <property> propulsion/engine/propeller-rpm </property>
  <property> propulsion/engine/fuel-flow-rate-gph </property>
  <property> propulsion/engine/thrust-lbs </property>
  <property> fcs/right-aileron-pos-norm </property>
  <property> fcs/elevator-pos-norm </property>

  <property> fcs/rudder-pos-norm </property>
    <property> simulation/dt </property>

  <property> position/geod-alt-ft </property>
  <property> position/radius-to-vehicle-ft </property>
  <property> fcs/throttle-pos-norm </property>
  <property> inertia/weight-lbs </property>
 <property> propulsion/total-fuel-lbs </property>
<!--  <property>pixhawk/sensor/theta1-deg</property>
  <property>pixhawk/sensor/phi1-deg</property>
  <property>pixhawk/sensor/psi1-deg</property>-->
    <property>pixhawk/sensor/theta-deg</property>
  <property>pixhawk/sensor/phi-deg</property>
  <property>pixhawk/sensor/psi-deg</property>
  <property>pixhawk/sensor/airspeed</property>
  <property>pixhawk/sensor/lat</property>
  <property>pixhawk/sensor/lon</property>
  <property>pixhawk/sensor/alt</property>
  <property>pixhawk/sensor/accelx</property>
  <property>pixhawk/sensor/accely</property>
  <property>pixhawk/sensor/accelz</property>
  <property> fcs/elevator-pos-norm </property>
 </output>

 <!-- this is the telnet interface -->
 <!-- <input port="5137" /> -->

 <!-- 18 properties input, + 1 for the time stamp -->
 <input port="5139" type="QTJSBSIM" rate="20">

  <property> fcs/aileron-cmd-norm </property>
  <property> fcs/elevator-cmd-norm </property>
  <property> fcs/rudder-cmd-norm </property>
  <property> fcs/pitch-trim-cmd-norm </property>
  <property> fcs/roll-trim-cmd-norm </property>
  <property> fcs/yaw-trim-cmd-norm </property>
  <property> fcs/throttle-cmd-norm </property>

  <property> simulation/terminate </property>
  <property> simulation/pause </property>
    <property> auto/aileron-cmd-norm </property>
  <property> auto/elevator-cmd-norm </property>
  <property>pixhawk/arming</property>
  <property> auto/rudder-cmd-norm </property>
  <property>auto/des-alt</property>
  <property>auto/des-hdg</property>
    <property> atmosphere/psiw-deg </property>
  <property> atmosphere/wind-mag-kts </property>

 </input>

 <!-- <output name="localhost" type="SOCKET" protocol="UDP" port="5140"  rate="30">

      <property> propulsion/engine/power-hp </property>
   <property> attitude/psi-deg </property>

 </output>   -->

  <output name="autolpilotesting.csv" type="CSV" rate="10">

  <property> attitude/psi-deg </property>
  <property> velocities/p-rad_sec </property>
  <property> attitude/phi-deg </property>
  <property> fcs/right-aileron-pos-deg </property>

  <property> position/h-sl-ft </property>
  <property> attitude/theta-deg </property>
  <property> fcs/elevator-pos-deg </property>

  <property> position/lat-gc-deg </property>
  <property> position/long-gc-deg </property>
  <property>auto/des-alt</property>
  <property>auto/des-hdg</property>

  </output>

   <output name="hdotcomparison airspeedsens.csv" type="CSV" rate="10">

     <property>pixhawk/sensor/hdotcalc</property>
     <property>pixhawk/sensor/hdotmav</property>
     <property>pixhawk/sensor/airspeed</property>


  </output>

  <system file="px4_default_imu_sensor"/>
  <system file="px4_default_gps_sensor"/>
</fdm_config>
